*HEADING
*Part, name=Piece
*USER ELEMENT, NODES=36, TYPE=U1, COORDINATES=3, variables=1404, I PROPERTIES=8, PROPERTIES=28
1,2,3
*USER ELEMENT, NODES=48, TYPE=U2, COORDINATES=3, variables=1872, I PROPERTIES=8, PROPERTIES=28
1,2,3
*USER ELEMENT, NODES=64, TYPE=U3, COORDINATES=3, variables=2496, I PROPERTIES=8, PROPERTIES=28
1,2,3
*Node,nset=AllNode
1,	13.8029,	20.3053,	30
2,	30,	30,	30
3,	13.8029,	20.3053,	0
4,	30,	30,	0
5,	6.94046,	20.3053,	30
6,	0,	30,	30
7,	6.94046,	20.3053,	0
8,	0,	30,	0
9,	0,	0,	0
10,	6.94046,	13.0316,	0
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*Element, type=U1,elset=AllEls
1, 1, 73, 77, 76, 78, 79, 86, 85, 130, 133, 134, 139, 17,
74, 80, 81, 140, 143, 21, 75, 82, 83, 20, 84, 132, 138,
142, 22, 87, 91, 90, 23, 88, 30, 89, 29
2, 8, 92, 96, 95, 97, 98, 105, 104, 210, 205, 206, 207, 36,
93, 99, 100, 39, 94, 101, 102, 33, 103, 209, 208, 32, 106,
110, 109, 200, 199, 40, 107, 45, 108, 35, 186
3, 11, 111, 115, 114, 116, 117, 124, 123, 261, 263, 264, 266, 50,
112, 118, 119, 53, 113, 120, 121, 41, 122, 228, 230, 47, 125,
129, 128, 262, 265, 54, 126, 59, 127, 42, 229
4, 1, 130, 133, 76, 73, 134, 139, 77, 78, 79, 86, 85, 64,
131, 135, 136, 66, 132, 137, 138, 20, 75, 83, 84, 17, 74,
80, 81, 140, 143, 67, 141, 69, 142, 21, 82
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*Element, type=U2,elset=AllEls
65, 17, 144, 147, 74, 80, 148, 153, 81, 140, 143, 374, 379, 73,
77, 79, 86, 134, 139, 2, 145, 149, 150, 380, 383, 18, 146,
151, 152, 21, 82, 142, 378, 382, 75, 83, 138, 87, 23, 88,
91, 154, 157, 24, 155, 25, 156, 30, 89
66, 20, 75, 174, 173, 84, 83, 178, 177, 132, 369, 138, 371, 76,
77, 85, 86, 133, 139, 74, 21, 81, 82, 143, 142, 160, 166,
373, 19, 172, 165, 175, 3, 176, 368, 370, 372, 90, 91, 89,
29, 181, 180, 88, 30, 170, 27, 179, 28
67, 23, 154, 157, 88, 184, 196, 201, 185, 79, 80, 81, 86, 87,
91, 148, 153, 183, 190, 149, 150, 24, 155, 197, 198, 151, 152,
25, 156, 82, 30, 199, 200, 186, 83, 89, 187, 191, 31, 192,
195, 202, 204, 6, 203, 32, 109, 35, 193
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*Element, type=U3,elset=AllEls
193, 21, 146, 161, 160, 82, 152, 167, 166, 142, 373, 378, 398, 77,
74, 75, 86, 81, 83, 139, 138, 143, 147, 153, 174, 178, 371,
379, 145, 18, 150, 151, 158, 162, 383, 382, 400, 4, 159, 163,
164, 19, 165, 372, 397, 399, 172, 175, 370, 91, 88, 30, 89,
157, 156, 171, 170, 181, 155, 25, 168, 26, 169, 27, 179
194, 30, 156, 171, 170, 186, 200, 210, 209, 86, 81, 82, 83, 91,
88, 89, 153, 152, 157, 167, 166, 178, 181, 190, 185, 187, 201,
214, 150, 151, 155, 25, 162, 168, 198, 199, 205, 163, 164, 26,
169, 165, 27, 206, 207, 208, 175, 179, 211, 195, 192, 35, 193,
204, 109, 104, 103, 217, 203, 32, 97, 8, 95, 33, 215
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*ELSET,ELSET=EltPAtch1,generate
1, 256, 1
*UEL PROPERTY, ELSET=EltPAtch1
**---E11---|---v12---|----c1---|---c2----|---c3----|----c4---|----c5---|---c6----|
    100000,     0.3,     1.0e6,    6.0e1,   80.000,   0.2500,   0.9000,    2.239,
**
**---Y0----|----ep0--|---Y1----|----ep1--|---Y2----|----ep2--|---Y3----|----ep3--|
  1157.000,    0.000,   0.0000,   0.0100,1207.5147,  0.00000,1224.9017,   0.0500,
**
**---Y4----|----ep4--|---Y5----|----ep5--|---Y6----|----ep6--|---Y7----|----ep7--|
1252.362103,   0.0800,1270.5188,   0.1000,  1426.00,   0.3000,   1538.0,   0.6000,
**-------------------------> PROPS(28) | JPROPS(1)
**---fGT---|---fxC---|---Gxc---|---fGc---|-CohType-|--FtgMnt-|-psudo3D-|-VirtualE|
     0.4,      0.5,     65.0,      0.5,        2,        1,        0,        4,
**-----------------------------> JPROPS(8)
** --NPLY--|--FaiCrt-|CDDC_NE_D|---------|
       1,        3,        0,        0
*End Part
*Assembly, name=Assembly
*Instance, name=I1, part=Piece
*End Instance
*End Assembly
*MATERIAL,NAME=MAT
*Elastic
100000, 0.3
**
** Modification (3): Add an amplitude definition
**
*amplitude, name=AMP1
0.0, 1.0, 1.0e6, 1.0
**
** Modification (4): Add a *Temperature line
**
*Temperature, amplitude=AMP1
I1.AllNode, 0.0
*node file, frequency=1
U,RF,CF
*el file, frequency=1
SDV
*End Step
