*HEADING
*Part, name=Piece
*USER ELEMENT, NODES=36, TYPE=U1, COORDINATES=3, variables=1404, I PROPERTIES=8, PROPERTIES=28
1,2,3
*USER ELEMENT, NODES=27, TYPE=U2, COORDINATES=3, variables=1053, I PROPERTIES=8, PROPERTIES=28
1,2,3
*USER ELEMENT, NODES=51, TYPE=U3, COORDINATES=3, variables=1989, I PROPERTIES=8, PROPERTIES=28
1,2,3
*USER ELEMENT, NODES=46, TYPE=U4, COORDINATES=3, variables=1794, I PROPERTIES=8, PROPERTIES=28
1,2,3
*USER ELEMENT, NODES=48, TYPE=U5, COORDINATES=3, variables=1872, I PROPERTIES=8, PROPERTIES=28
1,2,3
*USER ELEMENT, NODES=64, TYPE=U6, COORDINATES=3, variables=2496, I PROPERTIES=8, PROPERTIES=28
1,2,3
*USER ELEMENT, NODES=56, TYPE=U7, COORDINATES=3, variables=2184, I PROPERTIES=8, PROPERTIES=28
1,2,3
*USER ELEMENT, NODES=60, TYPE=U8, COORDINATES=3, variables=2340, I PROPERTIES=8, PROPERTIES=28
1,2,3
*USER ELEMENT, NODES=42, TYPE=U9, COORDINATES=3, variables=1638, I PROPERTIES=8, PROPERTIES=28
1,2,3
*USER ELEMENT, NODES=45, TYPE=U10, COORDINATES=3, variables=1755, I PROPERTIES=8, PROPERTIES=28
1,2,3
*USER ELEMENT, NODES=54, TYPE=U11, COORDINATES=3, variables=2106, I PROPERTIES=8, PROPERTIES=28
1,2,3
*USER ELEMENT, NODES=52, TYPE=U12, COORDINATES=3, variables=2028, I PROPERTIES=8, PROPERTIES=28
1,2,3
*USER ELEMENT, NODES=57, TYPE=U13, COORDINATES=3, variables=2223, I PROPERTIES=8, PROPERTIES=28
1,2,3
*USER ELEMENT, NODES=49, TYPE=U14, COORDINATES=3, variables=1911, I PROPERTIES=8, PROPERTIES=28
1,2,3
*USER ELEMENT, NODES=50, TYPE=U15, COORDINATES=3, variables=1950, I PROPERTIES=8, PROPERTIES=28
1,2,3
*USER ELEMENT, NODES=40, TYPE=U16, COORDINATES=3, variables=1560, I PROPERTIES=8, PROPERTIES=28
1,2,3
*USER ELEMENT, NODES=44, TYPE=U17, COORDINATES=3, variables=1716, I PROPERTIES=8, PROPERTIES=28
1,2,3
*USER ELEMENT, NODES=39, TYPE=U18, COORDINATES=3, variables=1521, I PROPERTIES=8, PROPERTIES=28
1,2,3
*Node,nset=AllNode
1,	1.30256,	3.03286,	1.02226
2,	1.164,	3.03098,	5.28988
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*Element, type=U1,elset=AllEls
1, 1, 298, 302, 301, 303, 304, 311, 310, 824, 829, 830, 833, 61,
299, 305, 306, 65, 300, 307, 308, 64, 309, 828, 832, 66, 350,
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*Element, type=U2,elset=AllEls
169, 25, 411, 415, 414, 416, 417, 424, 423, 145, 412, 418, 419, 149,
413, 420, 421, 148, 422, 150, 425, 429, 428, 151, 426, 158, 427,
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*Element, type=U3,elset=AllEls
173, 26, 430, 434, 433, 435, 436, 443, 442, 1036, 1038, 1039, 1041, 1518,
1519, 1521, 1522, 1523, 1526, 1726, 1728, 164, 431, 437, 438, 1527, 1528,
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*Element, type=U4,elset=AllEls
189, 27, 449, 453, 452, 454, 455, 462, 461, 1104, 1106, 1107, 1109, 1569,
1570, 1573, 1574, 1575, 1577, 1751, 1753, 178, 450, 456, 457, 181, 451,
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*Element, type=U5,elset=AllEls
197, 30, 487, 491, 490, 492, 493, 500, 499, 1048, 1045, 1046, 1052, 1049,
1050, 1125, 1126, 1226, 1228, 166, 488, 494, 495, 1115, 1119, 208, 489,
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*Element, type=U6,elset=AllEls
765, 74, 668, 679, 678, 693, 704, 715, 714, 311, 306, 307, 308, 316,
313, 314, 665, 664, 669, 676, 675, 686, 689, 695, 692, 694, 705,
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
*ELSET,ELSET=EltPAtch1,generate
1, 1300, 1
*UEL PROPERTY, ELSET=EltPAtch1
**---E11---|---v12---|----c1---|---c2----|---c3----|----c4---|----c5---|---c6----|
    100000,     0.3,     1.0e6,    6.0e1,   80.000,   0.2500,   0.9000,    2.239,
**
**---Y0----|----ep0--|---Y1----|----ep1--|---Y2----|----ep2--|---Y3----|----ep3--|
  1157.000,    0.000,   0.0000,   0.0100,1207.5147,  0.00000,1224.9017,   0.0500,
**
**---Y4----|----ep4--|---Y5----|----ep5--|---Y6----|----ep6--|---Y7----|----ep7--|
1252.362103,   0.0800,1270.5188,   0.1000,  1426.00,   0.3000,   1538.0,   0.6000,
**-------------------------> PROPS(28) | JPROPS(1)
**---fGT---|---fxC---|---Gxc---|---fGc---|-CohType-|--FtgMnt-|-psudo3D-|-VirtualE|
     0.4,      0.5,     65.0,      0.5,        2,        1,        0,        4,
**-----------------------------> JPROPS(8)
** --NPLY--|--FaiCrt-|CDDC_NE_D|---------|
       1,        3,        0,        0
*End Part
*Assembly, name=Assembly
*Instance, name=I1, part=Piece
*End Instance
*End Assembly
*MATERIAL,NAME=MAT
*Elastic
100000, 0.3
**
** Modification (3): Add an amplitude definition
**
*amplitude, name=AMP1
0.0, 1.0, 1.0e6, 1.0
**
** Modification (4): Add a *Temperature line
**
*Temperature, amplitude=AMP1
I1.AllNode, 0.0
*node file, frequency=1
U,RF,CF
*el file, frequency=1
SDV
*End Step
